<?xml version="1.0" encoding="UTF-8"?>
<!--
**************************************************************************

Lycoming O-320-A2B Piston Engine

Copyright (c) 2015 Richard Senior

This program is free software: you can redistribute it and/or modify
it under the terms of the GNU General Public License as published by
the Free Software Foundation, either version 2 of the License, or
(at your option) any later version.

This program is distributed in the hope that it will be useful,
but WITHOUT ANY WARRANTY; without even the implied warranty of
MERCHANTABILITY or FITNESS FOR A PARTICULAR PURPOSE.  See the
GNU General Public License for more details.

You should have received a copy of the GNU General Public License
along with this program.  If not, see <http://www.gnu.org/licenses/>.

**************************************************************************
-->

<!--
References:

1. Lycoming O-320 Operator's Manual
http://grummanpilotsassociation.com/wp-content/uploads/2015/01/Lycoming-O-320-Operators-Manual.pdf

2. Beagle Pup 150 Specifications
www.pilotfriend.com/aircraft%20performance/Beagle/A500.htm

3. Beagle Pup Performace
www.flightglobal.com/FlightPDFArchive/1968/1968%20-%200659.PDF
-->

<piston_engine name="Lycoming O-320-A2B">

  <!-- Basic Paremeters -->
  <minmp unit="INHG">12.0</minmp>
  <maxmp unit="INHG">28.7</maxmp>
  <man-press-lag>1.0</man-press-lag>
  <starter-torque>75</starter-torque>
  <starter-rpm>800</starter-rpm>
  <idlerpm>400.0</idlerpm>
  <maxrpm>2700.0</maxrpm>
  <maxhp>150.00</maxhp>
  <displacement unit="IN3">319.8</displacement>
  <cycles>4.0</cycles>
  <bore unit="IN">5.125</bore>
  <stroke unit="IN">3.875</stroke>
  <compression-ratio>7.0</compression-ratio>
  <sparkfaildrop>0.1</sparkfaildrop>
  <static-friction>1.5</static-friction>

  <!-- Advanced Parameters -->
  <bsfc>0.41</bsfc>
  <volumetric-efficiency>0.89</volumetric-efficiency>
  <air-intake-impedance-factor>0.05</air-intake-impedance-factor>
  <ram-air-factor>0.0</ram-air-factor>

  <!-- Cooling Control -->
  <cylinders>4.0</cylinders>
  <cylinder-head-mass unit="LBS">12</cylinder-head-mass>
  <cooling-factor>0.6</cooling-factor>

</piston_engine>
