<?xml version="1.0" encoding="UTF-8"?>
<?xml-stylesheet type="text/xsl" href="http://jsbsim.sourceforge.net/JSBSim.xsl"?>
<!--
**************************************************************************

Beagle Pup 160 (B.121 Series 3)

Copyright (c) 2015 Richard Senior

This program is free software: you can redistribute it and/or modify
it under the terms of the GNU General Public License as published by
the Free Software Foundation, either version 2 of the License, or
(at your option) any later version.

This program is distributed in the hope that it will be useful,
but WITHOUT ANY WARRANTY; without even the implied warranty of
MERCHANTABILITY or FITNESS FOR A PARTICULAR PURPOSE.  See the
GNU General Public License for more details.

You should have received a copy of the GNU General Public License
along with this program.  If not, see <http://www.gnu.org/licenses/>.

**************************************************************************
-->

<fdm_config name="Beagle-121-3" version="2.0" release="ALPHA"
  xmlns:xsi="http://www.w3.org/2001/XMLSchema-instance"
  xsi:noNamespaceSchemaLocation="http://jsbsim.sourceforge.net/JSBSim.xsd">

  <fileheader>
    <author>Richard Senior (Aeromatic v3.1.0)</author>
    <filecreationdate>30 Nov 2015</filecreationdate>
    <version>0.1</version>
    <description>Beagle Pup Series 3 (Pup 160)</description>
  </fileheader>

  <metrics>
    <wingarea  unit="FT2">  119.50 </wingarea>
    <wingspan  unit="FT" >   31.00 </wingspan>
    <wing_incidence>          1.15 </wing_incidence>
    <chord     unit="FT" >    4.69 </chord>
    <htailarea unit="FT2">   19.12 </htailarea>
    <htailarm  unit="FT" >   11.86 </htailarm>
    <vtailarea unit="FT2">   21.70 </vtailarea>
    <vtailarm  unit="FT" >   12.34 </vtailarm>
    <location name="AERORP" unit="IN">
      <x>  82.00 </x>
      <y>   0.00 </y>
      <z>  -6.50 </z>
    </location>
    <location name="EYEPOINT" unit="IN">
      <x>  82.00 </x>
      <y> -18.00 </y>
      <z>  20.00 </z>
    </location>
    <location name="VRP" unit="IN">
      <x>0</x>
      <y>0</y>
      <z>0</z>
    </location>
  </metrics>

  <mass_balance>
    <ixx unit="SLUG*FT2">    599.40 </ixx>
    <iyy unit="SLUG*FT2">    582.51 </iyy>
    <izz unit="SLUG*FT2">   1096.99 </izz>
    <!-- Copied from the 150 with a small addition for larger fuel tanks -->
    <emptywt unit="LBS" >   824.00 </emptywt>
    <location name="CG" unit="IN">
      <x>  74.00 </x>
      <y>   0.00 </y>
      <z>  -6.00 </z>
    </location>
    <pointmass name="Engine">
      <description>Engine and associated components</description>
      <weight unit="LBS">278</weight>
      <location name="POINTMASS" unit="IN">
        <x>  36.00 </x>
        <y>   0.00 </y>
        <z>  -2.00 </z>
      </location>
    </pointmass>
    <pointmass name="Pilot">
      <description>Pilot</description>
      <weight unit="LBS">170</weight>
      <location name="POINTMASS" unit="IN">
        <x>  82.00 </x>
        <y> -12.00 </y>
        <z>  -6.00 </z>
      </location>
    </pointmass>
    <pointmass name="Co-Pilot">
      <description>Co-Pilot</description>
      <weight unit="LBS">0</weight>
      <location name="POINTMASS" unit="IN">
        <x>  82.00 </x>
        <y>  12.00 </y>
        <z>  -6.00 </z>
      </location>
    </pointmass>
    <pointmass name="Rear Seat">
      <description>Rear Seat</description>
      <weight unit="LBS">0</weight>
      <location name="POINTMASS" unit="IN">
        <x> 122.00 </x>
        <y>   0.00 </y>
        <z>   0.00 </z>
      </location>
    </pointmass>
  </mass_balance>

  <ground_reactions file="pup-ground-reactions"/>
  <system file="crash-detect"/>

  <propulsion>

    <engine file="Lycoming_0-320-D2C">
      <location unit="IN">
        <x>  28.98 </x>
        <y>   0.00 </y>
        <z>   0.00 </z>
      </location>
      <orient unit="DEG">
        <pitch> 0.00 </pitch>
        <roll>  0.00 </roll>
        <yaw>   0.00 </yaw>
      </orient>
      <feed>0</feed>
      <thruster file="Sensenich_M74DMS-0-62">
        <sense> 1 </sense>
        <location unit="IN">
          <x>  10.73 </x>
          <y>   0.00 </y>
          <z>   0.00 </z>
        </location>
        <orient unit="DEG">
          <pitch> 0.00 </pitch>
          <roll>  0.00 </roll>
          <yaw>   0.00 </yaw>
        </orient>
      </thruster>
    </engine>

    <!-- Fuel manifold, fuel pump, etc. -->
    <tank type="FUEL" number="0">
      <location unit="IN">
        <x>  41.00 </x>
        <y>   0.00 </y>
        <z>   0.00 </z>
      </location>
      <capacity unit="LBS">1.00</capacity>
      <contents unit="LBS">0.00</contents>
    </tank>

    <tank type="FUEL" number="1">
      <location unit="IN">
        <x>  79.00 </x>
        <y> -68.00 </y>
        <z> -12.00 </z>
      </location>
      <capacity unit="LBS"> 138.60 </capacity>
      <contents unit="LBS">  34.65 </contents>
    </tank>

    <tank type="FUEL" number="2">
      <location unit="IN">
        <x>  79.00 </x>
        <y>  68.00 </y>
        <z> -12.00 </z>
      </location>
      <capacity unit="LBS"> 138.60 </capacity>
      <contents unit="LBS">  34.65 </contents>
    </tank>

  </propulsion>

  <system file="fuel"/>
  <flight_control name="FCS: BeaglePup-121-3" file="pup-flight-control"/>
  <aerodynamics file="pup-aerodynamics"/>

</fdm_config>
